units		real
atom_style	hybrid angle dipole sphere
read_data 	data.128lip4232wat
include 	forcefield.elba
velocity	all create 0.0 87287

variable	nLips equal 128 # total number of lipids
variable	nWats equal 4232 # total number of waters
variable	watVol equal 30.0 # water molecular volume (~30 A^3)
variable	atmA__in__mN_m equal 0.01013 # 1 atm*A = 0.01013 mN/m

variable	Neqnvt equal 5000
variable	Neqnpt equal 50000
variable	Nprod equal 100000
variable	Nthe equal 5000
variable	Ndump equal 10000
variable	Ne equal 2
variable	Nr equal 50000
variable	Nf equal ${Nprod}+${Neqnvt}+${Neqnpt}
variable	Nthe_e equal ${Nthe}/${Ne}
variable	Dz equal 1.0

group		lip type 2 3 4 5 6
group		head type 2 3
group		wat type 1
group		chol type 2
group		phos type 3
group		gly type 4
group		est type 5
group		tail type 6

timestep	10
neighbor	1 bin
neigh_modify	delay 0

fix		integrate all nve/sphere update dipole
fix 		thermo all langevin 303 303 1000 9 omega yes zero yes
fix             removeMomentum all momentum 100 linear 1 1 1 # angular

dump	trj all custom ${Ndump} dump.*.trj id type mol x y z mux muy muz
dump_modify	trj sort id pad 6

# compute and average area and volume per lipid:
variable	lipArea equal lx*ly/(${nLips}/2)
fix		lipArea lip ave/time ${Ne} ${Nthe_e} ${Nthe} v_lipArea
variable	lipVol equal (vol-(${nWats}*${watVol}))/${nLips}
fix		lipVol lip ave/time ${Ne} ${Nthe_e} ${Nthe} v_lipVol

# compute and average pressure:
variable	P equal press
fix 		P all ave/time ${Ne} ${Nthe_e} ${Nthe} v_P

# compute and average total (translational + rotational) temperature:
compute 	tempTot all temp/sphere dof all
fix 		tempTot all ave/time ${Ne} ${Nthe_e} ${Nthe} c_tempTot
#compute_modify  tempTot extra 3 # default -> no effect

# compute and average rotational temperature:
compute 	tempRot all temp/sphere dof rotate
fix 		tempRot all ave/time ${Ne} ${Nthe_e} ${Nthe} c_tempRot

thermo_style custom step press f_P temp f_tempTot f_tempRot f_lipArea f_lipVol
thermo		${Nthe}

# compute and average surface tension (gamma) per monolayer:
variable	gamma equal (0.5*lz*(pzz-0.5*(pxx+pyy))/3)*${atmA__in__mN_m}
fix	gamma all ave/time ${Ne} ${Nthe_e} ${Nthe} v_gamma file gamma.dat

# compute and average interface area (bilayer assumed parallel to xy plane):
variable	xyArea equal lx*ly
fix 		xyArea all ave/time 1 1 ${Ne} v_xyArea file xyArea.dat

# compute and average box volume:
variable	boxVol equal vol
fix 		boxVol all ave/time 1 1 ${Ne} v_boxVol file boxVol.dat

run		${Neqnvt}

fix		baro all press/berendsen aniso 1 1 1000 couple xy modulus 21740

run		${Neqnpt}

compute LIP lip chunk/atom bin/1d z center ${Dz} units box
fix numDensLip lip ave/chunk ${Ne} ${Nr} ${Nf} LIP density/number &
    file numDensLip.zProfile

compute WAT wat chunk/atom bin/1d z center ${Dz} units box
fix numDensWat wat ave/chunk ${Ne} ${Nr} ${Nf} WAT density/number &
    file numDensWat.zProfile

compute CHOL chol chunk/atom bin/1d z center ${Dz} units box
fix numDensChol chol ave/chunk ${Ne} ${Nr} ${Nf} CHOL density/number &
    file numDensChol.zProfile

compute PHOS phos chunk/atom bin/1d z center ${Dz} units box
fix numDensPhos phos ave/chunk ${Ne} ${Nr} ${Nf} PHOS density/number &
    file numDensPhos.zProfile

compute GLY gly chunk/atom bin/1d z center ${Dz} units box
fix numDensGly gly ave/chunk ${Ne} ${Nr} ${Nf} GLY density/number &
    file numDensGly.zProfile

compute EST est chunk/atom bin/1d z center ${Dz} units box
fix numDensEst est ave/chunk ${Ne} ${Nr} ${Nf} EST density/number &
    file numDensEst.zProfile

compute TAIL tail chunk/atom bin/1d z center ${Dz} units box
fix numDensTail tail ave/chunk ${Ne} ${Nr} ${Nf} TAIL density/number &
    file numDensTail.zProfile

compute S all chunk/atom bin/1d z center ${Dz} units box

compute	stpa all stress/atom NULL
fix stress all ave/chunk ${Ne} ${Nr} ${Nf} S c_stpa[1] c_stpa[2] c_stpa[3] &
    c_stpa[4] c_stpa[5] c_stpa[6] file stress.zProfile

compute	stke all stress/atom NULL ke
fix stressKE all ave/chunk ${Ne} ${Nr} ${Nf} S c_stke[1] c_stke[2] c_stke[3] &
    c_stke[4] c_stke[5] c_stke[6] file stressKinEn.zProfile

compute	stnb all stress/atom NULL pair
fix stressNB all ave/chunk ${Ne} ${Nr} ${Nf} S c_stnb[1] c_stnb[2] c_stnb[3] &
    c_stnb[4] c_stnb[5] c_stnb[6] file stressNonBond.zProfile

compute	stb all stress/atom NULL bond
fix stressB all ave/chunk ${Ne} ${Nr} ${Nf} S c_stb[1] c_stb[2] c_stb[3] &
    c_stb[4] c_stb[5] c_stb[6] file stressBond.zProfile

compute	sta all stress/atom NULL angle
fix stressA all ave/chunk ${Ne} ${Nr} ${Nf} S c_sta[1] c_sta[2] c_sta[3] &
    c_sta[4] c_sta[5] c_sta[6] file stressAngle.zProfile

compute	stv all stress/atom NULL virial # check this is redundant
fix stressV all ave/chunk ${Ne} ${Nr} ${Nf} S c_stv[1] c_stv[2] c_stv[3] &
    c_stv[4] c_stv[5] c_stv[6] file stressVir.zProfile

compute H head chunk/atom bin/1d z center ${Dz} units box
compute	chgH head property/atom q
fix qDensHead head ave/chunk ${Ne} ${Nr} ${Nf} H c_chgH file qDensHead.zProfile

compute	dipGly gly property/atom muz
fix muzGly gly ave/chunk ${Ne} ${Nr} ${Nf} GLY c_dipGly file muzGly.zProfile

compute	dipEst est property/atom muz
fix muzEst est ave/chunk ${Ne} ${Nr} ${Nf} EST c_dipEst file muzEst.zProfile

compute	dipWat wat property/atom muz
fix muzWat wat ave/chunk ${Ne} ${Nr} ${Nf} WAT c_dipWat file muzWat.zProfile

compute		msd gly msd com yes
fix 		msd gly ave/time 1 1 ${Ne} c_msd[4] file gly.msd

run		${Nprod}
